// COMSOL Multiphysics 5.5.0.359 model "LSPR.mph"
// Plasmonic Wire Grating
// modeldescr_woptics/plasmonic_wire_grating
// A plane wave is incident on a wire grating on a dielectric substrate. Diffraction efficiencies for the zeroth and first diffraction orders — both in transmission and reflection — are all computed as functions of the angle of incidence.
// Outline of the model tree

Parameters
  na = 1.33  // Refractive index, air
  nb = 1.58  // Refractive index, dielectric
  d = 200[nm]  // Grating constant
  lb = 600[nm]  // Vacuum wavelength
  f0 = c_const/lb  // Frequency
  alpha = 0  // Angle of incidence
  beta = asin(na*sin(alpha)/nb)  // Refraction angle
  gap = 20.0[nm]
  gold_surf_wd = 50[nm]
  gold_surf_hg = 10[nm]
  surface = 10[nm]
  pedestal = 20[nm]

Selections
  ewfd_dst_pc1: Explicit on boundaries 24, 25

Geometry
  geom1 "Geometry 1" (2D, length unit m)
    r1: Rectangle "Top" | pos = {-(d+gap+gold_surf_wd)/2, 0}; size = {d+gap+gold_surf_wd, (d*3)+gold_surf_hg}
    r2: Rectangle "Down"
      pos = {-(d+gap+gold_surf_wd)/2, -((d*3)+gold_surf_hg)}
      size = {d+gap+gold_surf_wd, (d*3)+gold_surf_hg}
    r3: Rectangle "gold_top" | pos = {-(gold_surf_wd)/2, surface+pedestal}; size = {gold_surf_wd, gold_surf_hg}
    r4: Rectangle "surface" | pos = {-(gold_surf_wd)/2, pedestal}; size = {gold_surf_wd, surface}
    r5: Rectangle "pedestal" | pos = {-pedestal/4, 0}; size = {pedestal/2, pedestal}
    r6: Rectangle "mesh" | pos = {-(gold_surf_wd*1.5)/2, 0}; size = {gold_surf_wd*1.5, surface+pedestal+2*gold_surf_hg}
    fin: Finalize "Form Union"

Materials
  mat1: Common "Surrounding" on all domains
    RefractiveIndex
      n = na
      ki = 0
  mat2: Common "Dielectric" on domains 4, 6
    RefractiveIndex
      n = nb
      ki = 0
  mat3: Common "Metal" on domains 5
    RefractiveIndex
      n = n_interp(1[1/m]*c_const/freq)
      ki = k_interp(1[1/m]*c_const/freq)
      n_interp: Interpolation
        table = 
          {2.066e-07, 1.25223320824}
          {2.1089508319E-7, 1.28860501667}
          {2.15279458439E-7, 1.32053986347}
          {2.19754982075E-7, 1.34888336249}
          {2.24323549012E-7, 1.3746284289}
          {2.28987093564E-7, 1.39882611415}
          {2.33747590255E-7, 1.42248550103}
          {2.38607054657E-7, 1.44647562039}
          {2.43567544248E-7, 1.47144312879}
          {2.48631159276e-07, 1.49775668894}
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        interp = piecewisecubic
      k_interp: Interpolation
        table = 
          {2.066e-07, 1.98591656445}
          {2.1089508319E-7, 1.97534779229}
          {2.15279458439E-7, 1.96597777856}
          {2.19754982075E-7, 1.95853718525}
          {2.24323549012E-7, 1.95347479861}
          {2.28987093564E-7, 1.95092054945}
          {2.33747590255E-7, 1.95067979422}
          {2.38607054657E-7, 1.9522622682}
          {2.43567544248E-7, 1.95494272809}
          {2.48631159276e-07, 1.95784420876}
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        interp = piecewisecubic
  mat4: Common "Au - Gold" (disabled) on no domains
    def "Basic"
      electricconductivity = 45.6e6[S/m]
      thermalexpansioncoefficient = 14.2e-6[1/K]
      heatcapacity = 129[J/(kg*K)]
      density = 19300[kg/m^3]
      thermalconductivity = 317[W/(m*K)]
    Enu "Young's modulus and Poisson's ratio"
      youngsmodulus = 70e9[Pa]
      poissonsratio = 0.44
    RefractiveIndex
      n = n_interp(1[1/m]*c_const/freq)
      ki = k_interp(1[1/m]*c_const/freq)

Physics
  ewfd: ElectromagneticWavesFrequencyDomain on all domains
    dependent variable E = {Ex, Ey, Ez}
    components.components = inplane
    wee1: WaveEquationElectric (default)
    pec1: PerfectElectricConductor (default)
    init1: init "Initial Values 1" (default)
    port1: Port on boundaries 5
      PortExcitation = on
      PortType = Periodic
      InputType = H
      Eampl = {0, 0, 1}
      Hampl = {0, 0, 1}
      alpha_inc = alpha
      n = na
      fmax = f0
    port2: Port on boundaries 2
      PortType = Periodic
      InputType = H
      Eampl = {0, 0, 1}
      Hampl = {0, 0, 1}
      alpha_inc = -beta
      n = nb
      fmax = f0
    pc1: PeriodicCondition on boundaries 1, 3, 24, 25
      PeriodicType = Floquet
      Floquet_source = FromPeriodicPort
      destinationDomains: boundaries 24, 25

Mesh
  mesh1 "Mesh 1"
    size: MeshSizeDefault | hmax = 2.44E-8; hmin = 9.15E-11; hauto = 2
    edg1: Edge on boundaries 1, 3
    ftri1: FreeTri "Free Triangular 1" (disabled) on domains 1, 2
    ftri2: FreeTri "Free Triangular 2" on domains 3-6
      size1: Size on domains 3-6 | hmax = 8.17E-10; hmin = 3.66E-11; custom = on
    cpe1: CopyEdge | source = boundaries 3; destination = boundaries 25
    cpe2: CopyEdge | source = boundaries 1; destination = boundaries 24
    ftri3: FreeTri "Free Triangular 3" on remaining entities

Studies
  std1 "Study 1"
    param: Parametric "Parametric Sweep" | pname = lb; plistarr = range(400[nm],1[nm],900[nm]); punit = m
    wave: Wavelength "Wavelength Domain" | plist = lb

Tables
  tbl1: Table
    // Global Evaluation 1 (1/(abs(ewfd.S21)^2))
    lb (m) | lambda0=4E-7, 1/(abs(ewfd.S21)^2) (1)
    4e-07 | 1.13552
    4.01e-07 | 1.1352
    4.02e-07 | 1.13489
    4.03e-07 | 1.13457
    4.04e-07 | 1.13425
    4.05e-07 | 1.13392
    4.06e-07 | 1.13358
    4.07e-07 | 1.13324
    4.08e-07 | 1.13289
    4.09e-07 | 1.13252
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
Plots
  pg2: PlotGroup1D "1D Plot Group 2" | data = none
    tblp1: Table "Table Graph 1" | table = tbl1