// COMSOL Multiphysics 5.5.0.359 model "my_custom_lspr_Model.mph"
// Outline of the model tree

Parameters
  na = 1.33  // Refractive index, air
  nb = 1.58  // Refractive index, dielectric
  d = 200[nm]  // Grating constant
  lb = 600[nm]  // Vacuum wavelength
  f0 = c_const/lb  // Frequency
  alpha = 0  // Angle of incidence
  beta = asin(na*sin(alpha)/nb)  // Refraction angle
  gap = 20.0[nm]
  gold_surf_wd = 50[nm]
  gold_surf_hg = 10[nm]
  surface = 10[nm]
  pedestal = 20[nm]

Selections
  sel1: Explicit on boundaries 24, 25

Geometry
  geom1 "Geometry 1" (2D, length unit m)
    r1: Rectangle "Top" | pos = {-(d+gap+gold_surf_wd)/2, 0}; size = {d+gap+gold_surf_wd, (d*3)+gold_surf_hg}
    r2: Rectangle "Down"
      pos = {-(d+gap+gold_surf_wd)/2, -((d*3)+gold_surf_hg)}
      size = {d+gap+gold_surf_wd, (d*3)+gold_surf_hg}
    r3: Rectangle "gold_top" | pos = {-(gold_surf_wd)/2, surface+pedestal}; size = {gold_surf_wd, gold_surf_hg}
    r4: Rectangle "surface" | pos = {-(gold_surf_wd)/2, pedestal}; size = {gold_surf_wd, surface}
    r5: Rectangle "pedestal" | pos = {-pedestal/4, 0}; size = {pedestal/2, pedestal}
    r6: Rectangle "mesh" | pos = {-(gold_surf_wd*1.5)/2, 0}; size = {gold_surf_wd*1.5, surface+pedestal+2*gold_surf_hg}
    fin: Finalize "Form Union"

Materials
  mat1: Common "Material 1" on domains 1-3
    RefractiveIndex
      n = na
      ki = 0
  mat2: Common "Material 2" on no domains
    RefractiveIndex
      n = nb
      ki = 0
  mat3: Common "Material 3" on no domains
    RefractiveIndex
      n = n_interp(1[1/m]*c_const/freq)
      ki = k_interp(1[1/m]*c_const/freq)
      n_interp: Interpolation
        table = 
          {2.066e-07, 1.25223320824}
          {2.1089508319E-7, 1.28860501667}
          {2.15279458439E-7, 1.32053986347}
          {2.19754982075E-7, 1.34888336249}
          {2.24323549012E-7, 1.3746284289}
          {2.28987093564E-7, 1.39882611415}
          {2.33747590255E-7, 1.42248550103}
          {2.38607054657E-7, 1.44647562039}
          {2.43567544248E-7, 1.47144312879}
          {2.48631159276e-07, 1.49775668894}
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        interp = piecewisecubic
      k_interp: Interpolation
        table = 
          {2.066e-07, 1.98591656445}
          {2.1089508319E-7, 1.97534779229}
          {2.15279458439E-7, 1.96597777856}
          {2.19754982075E-7, 1.95853718525}
          {2.24323549012E-7, 1.95347479861}
          {2.28987093564E-7, 1.95092054945}
          {2.33747590255E-7, 1.95067979422}
          {2.38607054657E-7, 1.9522622682}
          {2.43567544248E-7, 1.95494272809}
          {2.48631159276e-07, 1.95784420876}
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        interp = piecewisecubic

Physics
  ewfd: ElectromagneticWavesFrequencyDomain on all domains
    dependent variable E = {Ex, Ey, Ez}
    wee1: WaveEquationElectric (default)
    pec1: PerfectElectricConductor (default)
    init1: init "Initial Values 1" (default)
    port1: Port on boundaries 5 | PortType = Periodic; InputType = H; Hampl = {0, 0, 1}; alpha_inc = alpha; n = na
    port2: Port on boundaries 2 | PortType = Periodic; InputType = H; Hampl = {0, 0, 1}; n = nb
    pc1: PeriodicCondition on boundaries 1, 3, 24, 25
      PeriodicType = Floquet
      Floquet_source = FromPeriodicPort
      destinationDomains: boundaries 24, 25

Mesh
  mesh1 "Mesh 1" (physics-controlled)
    size: MeshSizeDefault | hauto = 1

Studies
  std1 "Study 1"
    param: Parametric "Parametric Sweep" | pname = lb; plistarr = range(400[nm],1[nm],900[nm]); punit = m
    wave: Wavelength "Wavelength Domain" | plist = 1[um]

Solver configurations
  sol1 "Solution 1" (study std1)
    v1: Variables "Dependent Variables 1"
    s1: Stationary "Stationary Solver 1" | stol = 0.01
      p1: Parametric | pname = lb; plistarr = range(400[nm],1[nm],900[nm]); punit = m; pcontinuationmode = no
      fc1: FullyCoupled | linsolver = d1
      d1: Direct "Suggested Direct Solver (ewfd)"

Datasets
  dset1: Solution | solution = sol1
  grid1: Grid1D | source = data; data = dset1; par1 = PHASE; parmax1 = 2*pi/1.0

Plots
  pg1: PlotGroup2D "Electric Field (ewfd)" | data = dset1
    surf1: Surface | expr = ewfd.normE
  pg2: PlotGroup1D "Reflectance, Transmittance, and Absorptance (ewfd)"
    data = dset1
    ylabel = Reflectance, transmittance, and absorptance (1)
    glob1: Global
      expr = {ewfd.Rorder_0, ewfd.Torder_0, ewfd.RTtotal, ewfd.Atotal}
      unit = {1, 1, 1, 1}
      descr = {"Reflectance, order 0", "Transmittance, order 0", Total reflectance and transmittance, Absorptance}
      xdata = expr
      xdataexpr = lb
  pg3: PlotGroup1D "Polarization Plot (ewfd)"
    data = grid1
    title = Polarization states, Color: Phase (Radians)
    xlabel = Jones vector, out-of-plane component
    ylabel = Jones vector, in-plane component
    lngr1: LineGraph
      expr = if(root.comp1.ewfd.normJR_0==0,0,0.5*root.comp1.ewfd.JRIP_0*exp(j*PHASE)/root.comp1.ewfd.normJR_0)+(0)
      xdata = expr
      xdataexpr = if(root.comp1.ewfd.normJR_0==0,0,0.5*root.comp1.ewfd.JROOP_0*exp(j*PHASE)/root.comp1.ewfd.normJR_0)+(0)
      legends = Reflection
      col1: Color "Color Expression 1" | expr = PHASE
    ann1: Annotation | text = m=0
    lngr2: LineGraph
      expr = if(root.comp1.ewfd.normJT_0==0,0,0.5*root.comp1.ewfd.JTIP_0*exp(j*PHASE)/root.comp1.ewfd.normJT_0)+(0)
      xdata = expr
      xdataexpr = if(root.comp1.ewfd.normJT_0==0,0,0.5*root.comp1.ewfd.JTOOP_0*exp(j*PHASE)/root.comp1.ewfd.normJT_0)+(0)
      legends = Transmission
      col1: Color "Color Expression 1" | expr = PHASE